// SBML level 3 version 2

model monod_CRM_mock()

  // Compartments:
  compartment default_compartment = 1;

  // Species:
  species glucose in default_compartment = 11.1;
  species acetate in default_compartment = 0;
  species biomass in default_compartment = 0.01;

  // Parameters:
  Vmax_glc = 10;
  Km_glc = 0.5;
  Vmax_ac = 2;
  Km_ac = 0.5;
  mu = 0;
  v_glc = 0;
  v_ac = 0;

  // Assignment rules:
  u_glc := Vmax_glc*glucose/(Km_glc + glucose + 1e-12);
  u_ac := Vmax_ac*acetate/(Km_ac + acetate + 1e-12);

  // Reactions:
  gr: => biomass; mu*biomass;
  eg: glucose => ; -v_glc*biomass*glucose/(glucose + 1e-9);  // modifiers: biomass
  ea: acetate => ; -v_ac*biomass*piecewise(1, v_ac > 0, acetate/(acetate + 1e-9));  // modifiers: biomass
end
